Ka1 := READPRN("Fig1a_K_t=20000_c=0.6.txt")
Ka2 := READPRN("Fig1a_K_t=20000_c=0.0.txt")
Ka1 := reverse(sort(Ka1))
ia1 := 0 .. length(Ka1) - 1
Ka2 := reverse(sort(Ka2))
ia2 := 0 .. length(Ka2) - 1
Kb1 := READPRN("Fig1b_K_t=20000_c=0.8.txt")
Kb2 := READPRN("Fig1b_K_t=20000_c=0.9.txt")
Kb1 := reverse(sort(Kb1))
ib1 := 0 .. length(Kb1) - 1
Kb2 := reverse(sort(Kb2))
ib2 := 0 .. length(Kb2) - 1
i1 := 0 .. 19
i2 := 20 .. 6148
i3 := 6149 .. length(Ka2) - 1
y1 := 4
y2 := 65
i4 := 0 .. 6148
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Ka2 = [
    149; 109; 100; 97; 97; 93; 90; 87; 84; 84
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]
j1 := 0 .. 36
j2 := 37 .. length(Kb2) - 1
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Kb2 = [
    1339; 1019; 880; 807; 765; 729; 719; 617; 599; 537
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]
N := 13500
n := 1
i := 0 .. N - n
K2 := submatrix(Ka2, n, N, 0, 0)
X[i] := n + i
p2 := line(ln(X), ln(K2))
p2 =  # no stored result
f2(y) := 800*y^p2[1]
Ka2 =  # no stored result
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